<?xml version="1.0" encoding="UTF-8" standalone="yes"?>
<neuroml lengthUnits="micron" xmlns="http://morphml.org/neuroml/schema">
    <cells>
        <cell name="cell2zr">
            <ns1:notes xmlns:ns1="http://morphml.org/metadata/schema">Cell morphology generated by neuroConstruct from file: cell2zr.CNG.swc
Original file cell2zr.txt.swc edited by Duncan Donohue using StdSwc version 1.21 on 5/25/05.
Irregularities and fixes documented in cell2zr.txt.swc.std.  See StdSwc1.21.doc for more information.
Amaral to SWC conversion from L-Measure. R. Scorcioni: rscorcio@gmu.edu
Original fileName:H:\\cells\\ca3\\henze\\cell2zr.txt
</ns1:notes>
            <ns2:segments xmlns:ns2="http://morphml.org/morphml/schema">
                <ns2:segment cable="0" id="0" name="Comp_1">
                    <ns2:proximal diameter="13.94206" x="-0.95" y="22.3667" z="0.0"/>
                    <ns2:distal diameter="13.94206" x="-0.95" y="22.3667" z="0.0"/>
                </ns2:segment>
                <ns2:segment cable="1" id="1" name="Comp_2" parent="0">
                    <ns2:proximal diameter="4.4" x="-0.95" y="22.3667" z="0.0"/>
                    <ns2:distal diameter="4.4" x="0.0" y="0.0" z="0.0"/>
                </ns2:segment>
                <ns2:segment cable="1" id="2" name="Comp_3" parent="1">
                    <ns2:distal diameter="4.4" x="3.0" y="3.0" z="-7.5"/>
                </ns2:segment>
                <ns2:segment cable="1" id="3" name="Comp_4" parent="2">
                    <ns2:distal diameter="3.6" x="8.0" y="-6.0" z="-7.5"/>
                </ns2:segment>
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            </ns2:segments>
            <ns3:cables xmlns:ns3="http://morphml.org/morphml/schema">
                <ns3:cable fractAlongParent="0.0" fract_along_parent="0.0" id="0" name="Soma">
                    <ns4:group xmlns:ns4="http://morphml.org/metadata/schema">all</ns4:group>
                    <ns5:group xmlns:ns5="http://morphml.org/metadata/schema">soma_group</ns5:group>
                    <ns6:group xmlns:ns6="http://morphml.org/metadata/schema">Colour_White</ns6:group>
                </ns3:cable>
                <ns3:cable fractAlongParent="0.5" fract_along_parent="0.0" id="1" name="Sec_Comp_2">
                    <ns7:group xmlns:ns7="http://morphml.org/metadata/schema">all</ns7:group>
                    <ns8:group xmlns:ns8="http://morphml.org/metadata/schema">Colour_DarkGrey</ns8:group>
                    <ns9:group xmlns:ns9="http://morphml.org/metadata/schema">axon_group</ns9:group>
                </ns3:cable>
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            </ns3:cables>
        </cell>
        <cell name="cell6zr">
            <ns622:notes xmlns:ns622="http://morphml.org/metadata/schema">Cell morphology generated by neuroConstruct from file: cell6zr.CNG.swc
Original file cell6zr.txt.swc edited by Duncan Donohue using StdSwc version 1.21 on 5/25/05.
Irregularities and fixes documented in cell6zr.txt.swc.std.  See StdSwc1.21.doc for more information.
Amaral to SWC conversion from L-Measure. R. Scorcioni: rscorcio@gmu.edu
Original fileName:H:\\cells\\ca3\\henze\\cell6zr.txt
</ns622:notes>
            <ns623:segments xmlns:ns623="http://morphml.org/morphml/schema">
                <ns623:segment cable="0" id="0" name="Comp_1">
                    <ns623:proximal diameter="16.70514" x="4.0625" y="14.9375" z="-50.9583"/>
                    <ns623:distal diameter="16.70514" x="4.0625" y="14.9375" z="-50.9583"/>
                </ns623:segment>
                <ns623:segment cable="1" id="1" name="Comp_2" parent="0">
                    <ns623:proximal diameter="1.6" x="4.0625" y="14.9375" z="-50.9583"/>
                    <ns623:distal diameter="1.6" x="0.0" y="0.0" z="-43.0"/>
                </ns623:segment>
                <ns623:segment cable="1" id="2" name="Comp_3" parent="1">
                    <ns623:distal diameter="1.6" x="13.5" y="-17.5" z="-43.0"/>
                </ns623:segment>
                <ns623:segment cable="1" id="3" name="Comp_4" parent="2">
                    <ns623:distal diameter="1.3" x="13.5" y="-29.0" z="-51.0"/>
                </ns623:segment>
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            </ns623:segments>
            <ns624:cables xmlns:ns624="http://morphml.org/morphml/schema">
                <ns624:cable fractAlongParent="0.0" fract_along_parent="0.0" id="0" name="Soma">
                    <ns625:group xmlns:ns625="http://morphml.org/metadata/schema">all</ns625:group>
                    <ns626:group xmlns:ns626="http://morphml.org/metadata/schema">soma_group</ns626:group>
                    <ns627:group xmlns:ns627="http://morphml.org/metadata/schema">Colour_White</ns627:group>
                </ns624:cable>
                <ns624:cable fractAlongParent="0.5" fract_along_parent="0.0" id="1" name="Sec_Comp_2">
                    <ns628:group xmlns:ns628="http://morphml.org/metadata/schema">all</ns628:group>
                    <ns629:group xmlns:ns629="http://morphml.org/metadata/schema">Colour_DarkGrey</ns629:group>
                    <ns630:group xmlns:ns630="http://morphml.org/metadata/schema">axon_group</ns630:group>
                </ns624:cable>
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            </ns624:cables>
        </cell>
        <cell name="cell1zr">
            <ns1130:notes xmlns:ns1130="http://morphml.org/metadata/schema">Cell morphology generated by neuroConstruct from file: cell1zr.CNG.swc
Original file cell1zr.txt.swc edited by Duncan Donohue using StdSwc version 1.21 on 5/25/05.
Irregularities and fixes documented in cell1zr.txt.swc.std.  See StdSwc1.21.doc for more information.
Amaral to SWC conversion from L-Measure. R. Scorcioni: rscorcio@gmu.edu
Original fileName:H:\\cells\\ca3\\henze\\cell1zr.txt
ORIGINAL_SOURCE
CREATURE
REGION
FIELD/LAYER
TYPE
CONTRIBUTOR
REFERENCE
RAW
EXTRAS
SOMA_AREA
SHRINKAGE_CORRECTION
VERSION_NUMBER
VERSION_DATE
*********************************************
SCALE 1.0 1.0 1.0
</ns1130:notes>
            <ns1131:segments xmlns:ns1131="http://morphml.org/morphml/schema">
                <ns1131:segment cable="0" id="0" name="Comp_1">
                    <ns1131:proximal diameter="13.206" x="-1.135" y="21.0" z="1.692"/>
                    <ns1131:distal diameter="13.206" x="-1.135" y="21.0" z="1.692"/>
                </ns1131:segment>
                <ns1131:segment cable="1" id="1" name="Comp_2" parent="0">
                    <ns1131:proximal diameter="1.8" x="-1.135" y="21.0" z="1.692"/>
                    <ns1131:distal diameter="1.8" x="0.0" y="0.0" z="0.0"/>
                </ns1131:segment>
                <ns1131:segment cable="1" id="2" name="Comp_3" parent="1">
                    <ns1131:distal diameter="1.8" x="-1.5" y="0.0" z="-2.0"/>
                </ns1131:segment>
                <ns1131:segment cable="1" id="3" name="Comp_4" parent="2">
                    <ns1131:distal diameter="1.8" x="-2.5" y="-6.5" z="-2.0"/>
                </ns1131:segment>
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            </ns1131:segments>
            <ns1132:cables xmlns:ns1132="http://morphml.org/morphml/schema">
                <ns1132:cable fractAlongParent="0.0" fract_along_parent="0.0" id="0" name="Soma">
                    <ns1133:group xmlns:ns1133="http://morphml.org/metadata/schema">all</ns1133:group>
                    <ns1134:group xmlns:ns1134="http://morphml.org/metadata/schema">soma_group</ns1134:group>
                    <ns1135:group xmlns:ns1135="http://morphml.org/metadata/schema">Colour_White</ns1135:group>
                </ns1132:cable>
                <ns1132:cable fractAlongParent="0.5" fract_along_parent="0.0" id="1" name="Sec_Comp_2">
                    <ns1136:group xmlns:ns1136="http://morphml.org/metadata/schema">all</ns1136:group>
                    <ns1137:group xmlns:ns1137="http://morphml.org/metadata/schema">Colour_DarkGrey</ns1137:group>
                    <ns1138:group xmlns:ns1138="http://morphml.org/metadata/schema">axon_group</ns1138:group>
                </ns1132:cable>
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            </ns1132:cables>
        </cell>
        <cell name="5199202a">
            <ns1655:notes xmlns:ns1655="http://morphml.org/metadata/schema">Cell morphology generated by neuroConstruct from file: 5199202.CNG.swc
Original file 5199202.out.swc edited by Duncan Donohue using StdSwc version 1.21 on 5/16/05.
Irregularities and fixes documented in 5199202.out.swc.std.  See StdSwc1.21.doc for more information.
Amaral conversion fix by Duncan Donohue
Types 3 and 4 switched
Claiborne to SWC conversion from L-Measure. R. Scorcioni: rscorcio@gmu.edu
Original fileName:D:\ded\p5\Archive\DG\Claiborne\5199202.out
</ns1655:notes>
            <ns1656:segments xmlns:ns1656="http://morphml.org/morphml/schema">
                <ns1656:segment cable="0" id="0" name="Comp_1">
                    <ns1656:proximal diameter="4.2261" x="0.0" y="0.0" z="0.0"/>
                    <ns1656:distal diameter="4.2261" x="0.0" y="0.0" z="0.0"/>
                </ns1656:segment>
                <ns1656:segment cable="1" id="1" name="Comp_2" parent="0">
                    <ns1656:proximal diameter="2.95" x="0.0" y="0.0" z="0.0"/>
                    <ns1656:distal diameter="2.95" x="-0.13" y="9.14" z="-2.64"/>
                </ns1656:segment>
                <ns1656:segment cable="1" id="2" name="Comp_3" parent="1">
                    <ns1656:distal diameter="2.95" x="0.2" y="11.85" z="-3.29"/>
                </ns1656:segment>
                <ns1656:segment cable="2" id="3" name="Comp_4" parent="2">
                    <ns1656:proximal diameter="1.97" x="0.2" y="11.85" z="-3.29"/>
                    <ns1656:distal diameter="1.97" x="2.83" y="14.8" z="-1.45"/>
                </ns1656:segment>
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            </ns1656:segments>
            <ns1657:cables xmlns:ns1657="http://morphml.org/morphml/schema">
                <ns1657:cable fractAlongParent="0.0" fract_along_parent="0.0" id="0" name="Soma">
                    <ns1658:group xmlns:ns1658="http://morphml.org/metadata/schema">all</ns1658:group>
                    <ns1659:group xmlns:ns1659="http://morphml.org/metadata/schema">soma_group</ns1659:group>
                    <ns1660:group xmlns:ns1660="http://morphml.org/metadata/schema">Colour_White</ns1660:group>
                </ns1657:cable>
                <ns1657:cable fractAlongParent="0.5" fract_along_parent="0.0" id="1" name="Sec_Comp_2">
                    <ns1661:group xmlns:ns1661="http://morphml.org/metadata/schema">all</ns1661:group>
                    <ns1662:group xmlns:ns1662="http://morphml.org/metadata/schema">dendrite_group</ns1662:group>
                    <ns1663:group xmlns:ns1663="http://morphml.org/metadata/schema">Colour_Green</ns1663:group>
                </ns1657:cable>
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            </ns1657:cables>
        </cell>
    </cells>
    <ns1772:populations xmlns:ns1772="http://morphml.org/networkml/schema">
        <ns1772:population cell_type="cell2zr" name="cell2zr">
            <ns1772:instances size="1">
                <ns1772:instance id="-4964806985883347383">
                    <ns1772:location x="0.0" y="0.0" z="0.0"/>
                    <ns1772:curveAssociation curveId="2849" time="0.30000001192092896"/>
                    <ns1772:rotation w="1.0" x="0.0" y="0.0" z="0.0"/>
                    <ns1772:scale x="0.01" y="0.01" z="0.01"/>
                </ns1772:instance>
            </ns1772:instances>
        </ns1772:population>
        <ns1772:population cell_type="cell6zr" name="cell6zr">
            <ns1772:instances size="1">
                <ns1772:instance id="2480143055938152769">
                    <ns1772:location x="0.0" y="0.0" z="0.0"/>
                    <ns1772:curveAssociation curveId="2849" time="0.10000000149011612"/>
                    <ns1772:rotation w="1.0" x="0.0" y="0.0" z="0.0"/>
                    <ns1772:scale x="0.01" y="0.01" z="0.01"/>
                </ns1772:instance>
            </ns1772:instances>
        </ns1772:population>
        <ns1772:population cell_type="cell1zr" name="cell1zr">
            <ns1772:instances size="1">
                <ns1772:instance id="9094267317770232332">
                    <ns1772:location x="0.0" y="0.0" z="0.0"/>
                    <ns1772:curveAssociation curveId="2849" time="0.5"/>
                    <ns1772:rotation w="1.0" x="0.0" y="0.0" z="0.0"/>
                    <ns1772:scale x="0.01" y="0.01" z="0.01"/>
                </ns1772:instance>
            </ns1772:instances>
        </ns1772:population>
        <ns1772:population cell_type="5199202a" name="5199202a">
            <ns1772:instances size="1">
                <ns1772:instance id="4005456686101753221">
                    <ns1772:location x="0.0" y="0.0" z="0.0"/>
                    <ns1772:curveAssociation curveId="3227" time="0.10000000149011612"/>
                    <ns1772:rotation w="1.0" x="0.0" y="0.0" z="0.0"/>
                    <ns1772:scale x="0.01" y="0.01" z="0.01"/>
                </ns1772:instance>
            </ns1772:instances>
        </ns1772:population>
    </ns1772:populations>
    <curves>
        <curve id="2849" name="CA">
            <ns1773:point x="292.1480407714844" y="-145.03244018554688" z="-181.23068237304688" xmlns:ns1773="http://morphml.org/metadata/schema"/>
            <ns1774:point x="315.1480407714844" y="-146.03244018554688" z="-181.23068237304688" xmlns:ns1774="http://morphml.org/metadata/schema"/>
            <ns1775:point x="309.1480407714844" y="-132.03244018554688" z="-181.23068237304688" xmlns:ns1775="http://morphml.org/metadata/schema"/>
            <ns1776:point x="288.1480407714844" y="-119.03245544433594" z="-181.23068237304688" xmlns:ns1776="http://morphml.org/metadata/schema"/>
            <ns1777:point x="274.1480407714844" y="-119.03245544433594" z="-181.23068237304688" xmlns:ns1777="http://morphml.org/metadata/schema"/>
        </curve>
        <curve id="3227" name="Dentate Gyrus">
            <ns1778:point x="280.19256591796875" y="-106.31267547607422" z="-181.09063720703125" xmlns:ns1778="http://morphml.org/metadata/schema"/>
            <ns1779:point x="269.19256591796875" y="-105.31267547607422" z="-181.09063720703125" xmlns:ns1779="http://morphml.org/metadata/schema"/>
            <ns1780:point x="249.19256591796875" y="-113.31267547607422" z="-181.09063720703125" xmlns:ns1780="http://morphml.org/metadata/schema"/>
            <ns1781:point x="275.19256591796875" y="-112.31267547607422" z="-181.09063720703125" xmlns:ns1781="http://morphml.org/metadata/schema"/>
        </curve>
    </curves>
    <slides>
        <slide>
            <name>hippocampus 2</name>
            <position x="332.5680236816406" y="-160.00669860839844" z="-139.4047393798828"/>
            <rotation w="0.7071067690849304" x="0.0" y="-0.7071067690849304" z="0.0"/>
            <scale x="11.280001640319824" y="11.280001640319824" z="11.280001640319824"/>
            <id>0</id>
            <imageURL>/etc/img/hippo2.jpg</imageURL>
            <ratio>0.8700000047683716</ratio>
        </slide>
        <slide>
            <name>striatum 1</name>
            <position x="200.128173828125" y="-153.4557647705078" z="-144.00071716308594"/>
            <rotation w="0.7071067690849304" x="0.0" y="-0.7071067690849304" z="0.0"/>
            <scale x="9.960002899169922" y="9.960002899169922" z="9.960002899169922"/>
            <id>0</id>
            <imageURL>/etc/img/striatum1.jpg</imageURL>
            <ratio>1.3300000429153442</ratio>
        </slide>
        <slide>
            <name>CCDBSlide 35</name>
            <position x="291.7175598144531" y="-156.13571166992188" z="-135.4983367919922"/>
            <rotation w="-0.7373945713043213" x="0.0" y="0.6754647493362427" z="0.0"/>
            <scale x="11.959997177124023" y="11.959997177124023" z="11.959997177124023"/>
            <id>0</id>
            <imageURL>http://ccdb.ucsd.edu/sand/main?event=rd&amp;type=512v&amp;mpid=35</imageURL>
            <ratio>0.8700000047683716</ratio>
        </slide>
        <slide>
            <name>Waldo</name>
            <position x="284.904052734375" y="-114.38167572021484" z="-181.4795379638672"/>
            <rotation w="-0.7259314060211182" x="0.0" y="0.6877681612968445" z="0.0"/>
            <scale x="3.8399972915649414" y="3.8399972915649414" z="3.8399972915649414"/>
            <id>0</id>
            <imageURL>/etc/img/hippo_slice2.jpg</imageURL>
            <ratio>1.340000033378601</ratio>
        </slide>
        <slide>
            <name>hippo3c</name>
            <position x="282.7668151855469" y="-114.47135162353516" z="-159.03135681152344"/>
            <rotation w="0.7316893935203552" x="0.0" y="-0.6816388368606567" z="0.0"/>
            <scale x="0.699999988079071" y="0.699999988079071" z="0.699999988079071"/>
            <id>0</id>
            <imageURL>/etc/img/hippo_slice3c.jpg</imageURL>
            <ratio>1.3300000429153442</ratio>
        </slide>
        <slide>
            <name>hippo3a</name>
            <position x="284.44635009765625" y="-120.85203552246094" z="-205.34542846679688"/>
            <rotation w="-0.7702319025993347" x="0.0" y="0.6377649307250977" z="0.0"/>
            <scale x="1.0" y="1.0" z="1.0"/>
            <id>0</id>
            <imageURL>/etc/img/hippo_slice3a.jpg</imageURL>
            <ratio>1.3300000429153442</ratio>
        </slide>
        <slide>
            <name>hippo3b</name>
            <position x="285.75311279296875" y="-114.51262664794922" z="-180.00192260742188"/>
            <rotation w="-0.737393856048584" x="0.0" y="0.6754632592201233" z="0.0"/>
            <scale x="0.8000002503395081" y="0.8000002503395081" z="0.8000002503395081"/>
            <id>0</id>
            <imageURL>/etc/img/hippo_slice3b.jpg</imageURL>
            <ratio>1.309999942779541</ratio>
        </slide>
        <slide>
            <name>cerebImage</name>
            <position x="468.40594482421875" y="-117.42851257324219" z="-249.7540740966797"/>
            <rotation w="0.9848077893257141" x="-0.0" y="-0.0" z="-0.1736481785774231"/>
            <scale x="3.71000075340271" y="3.71000075340271" z="3.71000075340271"/>
            <id>0</id>
            <imageURL>http://ccdb.ucsd.edu/sand/main?event=rd&amp;type=512v&amp;mpid=53</imageURL>
            <ratio>1.1100000143051147</ratio>
        </slide>
    </slides>
</neuroml>
